# OpenSim document version 40000
ScaleTool COSE_scaled:
  mass: 85.5 [kg]
  height: -1
  age: -1
  ModelScaler:
    apply: true
    scaling_order: measurements manualScale
    marker_file: DATA/Trial010.trc
    time_range: 0 3.528
    preserve_mass_distribution: true
    MeasurementSet:
      Measurement Torso: apply=true
        MarkerPair: markers=(CLAV RFWT)
        MarkerPair: markers=(C7 LBWT)
        BodyScale torso: axes=(X Y Z)
      Measurement Femur_r: apply=true
        MarkerPair: markers=(RBWT RKNE)
        BodyScale femur_r: axes=(X Y Z)
      Measurement Femur_l: apply=true
        MarkerPair: markers=(LBWT LKNE)
        BodyScale femur_l: axes=(X Y Z)
      Measurement Tibia_r: apply=true
        MarkerPair: markers=(RKNE RANE)
        MarkerPair: markers=(RKNI RANI)
        BodyScale tibia_r: axes=(X Y Z)
      Measurement Tibia_l: apply=true
        MarkerPair: markers=(LKNE LANE)
        MarkerPair: markers=(LKNI LANI)
        BodyScale tibia_l: axes=(X Y Z)
      Measurement Calca_l: apply=true
        MarkerPair: markers=(LHEE LTAR)
        BodyScale calcn_l: axes=(X Y Z)
      Measurement Calca_r: apply=true
        MarkerPair: markers=(RHEE RTAR)
        BodyScale calcn_r: axes=(X Y Z)
      Measurement Humerus_r: apply=true
        MarkerPair: markers=(RSHO RHUM)
        MarkerPair: markers=(RSHO RRAD)
        BodyScale humerus_r: axes=(X Y Z)
      Measurement Humerus_l: apply=true
        MarkerPair: markers=(LSHO LHUM)
        MarkerPair: markers=(LSHO LRAD)
        BodyScale humerus_l: axes=(X Y Z)
      Measurement Radius_l: apply=true
        MarkerPair: markers=(LRAD LWRA)
        MarkerPair: markers=(LWRA LWRB)
        BodyScale ulna_l: axes=(X Y Z)
        BodyScale radius_l: axes=(X Y Z)
      Measurement Radius_r: apply=true
        MarkerPair: markers=(RRAD RWRA)
        MarkerPair: markers=(RWRA RWRB)
        BodyScale ulna_r: axes=(X Y Z)
        BodyScale radius_r: axes=(X Y Z)
      Measurement Pelvis: apply=true
        MarkerPair: markers=(LFWT LBWT)
        MarkerPair: markers=(LFWT RFWT)
        BodyScale pelvis: axes=(X Y Z)
      Measurement Toes_r: apply=true
        MarkerPair: markers=(RTAR RTOE)
        BodyScale toes_r: axes=(X Y Z)
      Measurement Toes_l: apply=true
        MarkerPair: markers=(LTAR LTOE)
        BodyScale toes_l: axes=(X Y Z)
      Measurement hand_l: apply=false
    ScaleSet:
      Scale: scales=(1 1 1) segment=patella_r apply=true
      Scale: scales=(1 1 1) segment=talus_r apply=true
      Scale: scales=(1 1 1) segment=calcn_r apply=true
      Scale: scales=(1 1 1) segment=toes_r apply=true
      Scale: scales=(1 1 1) segment=patella_l apply=true
      Scale: scales=(1 1 1) segment=talus_l apply=true
      Scale: scales=(1 1 1) segment=calcn_l apply=true
      Scale: scales=(1 1 1) segment=toes_l apply=true
      Scale: scales=(1 1 1) segment=hand_r apply=true
      Scale: scales=(1 1 1) segment=hand_l apply=true
  MarkerPlacer:
    apply: true
    marker_file: DATA/Trial010.trc
    time_range: 0 0.1
    max_marker_movement: -1
    IKTaskSet:
      IKMarkerTask STRN: apply=true weight=1
      IKMarkerTask RSHO: apply=true weight=1
      IKMarkerTask LSHO: apply=true weight=1
      IKMarkerTask C7: apply=true weight=1
      IKMarkerTask T10: apply=true weight=1
      IKMarkerTask CLAV: apply=true weight=1
      IKMarkerTask RRAD: apply=true weight=1
      IKMarkerTask RWRB: apply=true weight=1
      IKMarkerTask RWRA: apply=true weight=1
      IKMarkerTask LRAD: apply=true weight=1
      IKMarkerTask LWRB: apply=true weight=1
      IKMarkerTask LWRA: apply=true weight=1
      IKMarkerTask RFWT: apply=true weight=1
      IKMarkerTask LFWT: apply=true weight=1
      IKMarkerTask RBWT: apply=true weight=1
      IKMarkerTask LBWT: apply=true weight=1
      IKMarkerTask RKNE: apply=true weight=1
      IKMarkerTask RANE: apply=true weight=1
      IKMarkerTask RANI: apply=true weight=1
      IKMarkerTask RHEE: apply=true weight=1
      IKMarkerTask RTOE: apply=true weight=1
      IKMarkerTask RTAR: apply=true weight=1
      IKMarkerTask LKNE: apply=true weight=1
      IKMarkerTask LANE: apply=true weight=1
      IKMarkerTask LANI: apply=true weight=1
      IKMarkerTask LHEE: apply=true weight=1
      IKMarkerTask LTOE: apply=true weight=1
      IKMarkerTask LTAR: apply=true weight=1
      IKMarkerTask RKNI: apply=true weight=1
      IKMarkerTask LKNI: apply=true weight=1
      IKMarkerTask RHUM: apply=true weight=1
      IKMarkerTask LHUM: apply=true weight=1
      IKMarkerTask RBAC: apply=true weight=1
      IKMarkerTask RTARI: apply=true weight=0
      IKMarkerTask LTARI: apply=true weight=0
